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/BATCH
/COM,ANSYS RELEASE 2021 R2           BUILD 21.2      UP20210601       14:53:50
/input,menust,tmp,''
/GST,ON
/PLO,INFO,3
/GRO,CURL,ON
/CPLANE,1
WPSTYLE,,,,,,,,0
RESUME
/COM,ANSYS RELEASE 2021 R2           BUILD 21.2      UP20210601       14:54:04
/POST1
/DSCALE,ALL,OFF
PLESOL, NL,SRAT, 0,1.0
PLESOL, NL,SRAT, 0,1.0
FINISH
! /EXIT,NOSAV
/BATCH
/COM,ANSYS RELEASE 2021 R2           BUILD 21.2      UP20210601       15:42:15
/COM,ANSYS RELEASE 2021 R2           BUILD 21.2      UP20210601       15:42:18
